d_pipe := 0.035 m
a := 20 cm
b := 20 cm
A_pipe := (d_pipe/2)^2*π
A_pipe = 9.62113 cm^2
c := 20 cm
air_density := 1.225 kg/m^3
c_air := 1005 J/(kg*K)
V_room := a*b*c = 8000 cm^3
m_air := V_room*air_density = 0.0098 kg
m'_multiplier := A_pipe*air_density = 0.00117859 kg/m
s_min := 0.2 m/s  # minimum air speed in the pipes
T_ext := 20 °C
A_room := 2*a*b + 2*b*c + 2*a*c = 0.24 m^2
C_r := m_air*c_air = 9.849 J/K  # Heat capacity of the room
C_h := 3 J/K
k_walls := 5.6 W/(m^2*K)  # Heat transfer coefficient (from internet for 3mm thickness acrilic sheet
# Heat transfer coefficient for loosing heat to the environment (unknown area)
K_heater := 0.1 W/K
K_h := 10 W/K  # Convection coefficient for heat transfer between heater and passing air (unknown area)
P_l := 5 W
P_h := 112.5 W
T := 23 °C
u_l := 100%
T_h
u_h := 100%
s := s_min + 0.5 m/s
u_s := 3*m/s
v := 50%
u_v := 100%
m' := s*m'_multiplier = 0.000825012 kg/s
T_h := 120 °C
T_hi := T*v + (1 - v)*T_ext = 21.5 °C
Q_h'_heater := P_h*u_h = 112.5 W
Q_h'_loss := K_heater*(T_ext - T_h) = -10 W
Q_h'_airflow := c_air*air_density*s*A_pipe*(T_h - T_hi) = 81.67 W
dTh := (Q_h'_heater + Q_h'_loss - Q_h'_airflow)/C_h
dTh = 6.94334 K/s
T_ho := T_hi + Q_h'_airflow/(m'*c_air)
T_ho = 120 °C
Q'_room_loss := k_walls*A_room*(T_ext - T)
Q'_room_loss = -4.032 W
Q'_lamp := P_l*u_l
Q'_lamp = 5 W
Q'_pipe := m'*c_air*(T_ho - T)
Q'_pipe = 80.4263 W
dT := (Q'_room_loss + Q'_lamp + Q'_pipe)/C_r = 8.26422 K/s
